<?xml version="1.0"?>
<?xml-stylesheet type="text/xsl" href="http://jsbsim.sourceforge.net/JSBSim.xsl"?>
<fdm_config name="lightning-f1a" version="2.0" release="ALPHA"
   xmlns:xsi="http://www.w3.org/2001/XMLSchema-instance"
   xsi:noNamespaceSchemaLocation="http://jsbsim.sourceforge.net/JSBSim.xsd">

 <fileheader>
  <author>AJ MacLeod, Aeromatic + Wind Tunnel Data</author>
  <filecreationdate>25/01/2006</filecreationdate>
  <version> 0.2 </version>
  <description> Lightning-F.1A </description>
 </fileheader>

<!--
  File:     lightning-f1a.xml
  Inputs:
    name:          lightning-f1a
    type:          two-engine supersonic fighter
    max weight:    35005.991265 lb
    wing span:     34.81141 ft
    length:        55.25204 ft
    wing area:     458.589 sq-ft
    gear type:     tricycle
    retractable?:  yes
    # engines:     2
    engine type:   turbine
    engine layout: middle fuselage
    yaw damper?    yes
  Outputs:
    wing loading:  76.33 lb/sq-ft
    CL-alpha:      3.6 per radian
    CL-0:          0.08
    CL-max:        1
    CD-0:          0.024
    K:             0.09

-->

 <metrics>
   <wingarea  unit="FT2">  458.50 </wingarea>
   <wingspan  unit="FT" >   34.10 </wingspan>
   <wing_incidence>          2.00 </wing_incidence>
   <chord     unit="FT" >   13.17 </chord>
   <htailarea unit="FT2">   91.72 </htailarea>
   <htailarm  unit="FT" >   22.10 </htailarm>
   <vtailarea unit="FT2">   82.55 </vtailarea>
   <vtailarm  unit="FT" >   22.10 </vtailarm>
   <location name="AERORP" unit="IN">
     <x> 397.81 </x>
     <y>   0.00 </y>
     <z>   0.00 </z>
   </location>
   <location name="EYEPOINT" unit="IN">
     <x> 132.60 </x>
     <y>   0.00 </y>
     <z>  38.00 </z>
   </location>
   <location name="VRP" unit="IN">
     <x>0</x>
     <y>0</y>
     <z>0</z>
   </location>
 </metrics>

 <mass_balance>
   <ixx unit="SLUG*FT2">     16619 </ixx>
   <iyy unit="SLUG*FT2">     57548 </iyy>
   <izz unit="SLUG*FT2">     55588 </izz>
   <ixy unit="SLUG*FT2">         0 </ixy>
   <ixz unit="SLUG*FT2">         0 </ixz>
   <iyz unit="SLUG*FT2">         0 </iyz>
   <emptywt unit="LBS" >     25000 </emptywt>
   <location name="CG" unit="IN">
     <x> 397.81 </x>
     <y>   0.00 </y>
     <z> -16.58 </z>
   </location>
 </mass_balance>

<ground_reactions>

  <contact type="BOGEY" name="NOSE">
    <location unit="IN">
      <x>  86.19 </x>
      <y>   0.00 </y>
      <z> -79.56 </z>
    </location>
    <static_friction>  0.02 </static_friction>
    <dynamic_friction> 0.02 </dynamic_friction>
    <rolling_friction> 0.02 </rolling_friction>
    <spring_coeff unit="LBS/FT">      20000.0 </spring_coeff>
    <damping_coeff unit="LBS/FT/SEC">  4000.0 </damping_coeff>
    <max_steer unit="DEG"> 360 </max_steer>
    <brake_group>NONE</brake_group>
    <retractable>1</retractable>
  </contact>

  <contact type="BOGEY" name="LEFT_MAIN">
    <location unit="IN">
      <x> 413.73 </x>
      <y> -83.71 </y>
      <z> -79.56 </z>
    </location>
    <static_friction>  0.80 </static_friction>
    <dynamic_friction> 0.50 </dynamic_friction>
    <rolling_friction> 0.02 </rolling_friction>
    <spring_coeff unit="LBS/FT">      35005.99 </spring_coeff>
    <damping_coeff unit="LBS/FT/SEC">  7001.20 </damping_coeff>
    <max_steer unit="DEG">0</max_steer>
    <brake_group>LEFT</brake_group>
    <retractable>1</retractable>
  </contact>

  <contact type="BOGEY" name="RIGHT_MAIN">
   <location unit="IN">
     <x> 413.73 </x>
     <y>  83.71 </y>
     <z> -79.56 </z>
   </location>
   <static_friction>  0.80 </static_friction>
   <dynamic_friction> 0.50 </dynamic_friction>
   <rolling_friction> 0.02 </rolling_friction>
   <spring_coeff unit="LBS/FT">      35005.99 </spring_coeff>
   <damping_coeff unit="LBS/FT/SEC">  7001.20 </damping_coeff>
   <max_steer unit="DEG">0</max_steer>
   <brake_group>RIGHT</brake_group>
   <retractable>1</retractable>
  </contact>

  <contact type="STRUCTURE" name="LEFT_WING">
    <location unit="IN">
     <x> 506.33 </x>
     <y>-216.53 </y>
     <z>  -8.36 </z>
    </location>
    <static_friction>  0.80 </static_friction>
    <dynamic_friction> 0.50 </dynamic_friction>
    <spring_coeff unit="LBS/FT">      35005.99 </spring_coeff>
    <damping_coeff unit="LBS/FT/SEC">  7001.20 </damping_coeff>
  </contact>

  <contact type="STRUCTURE" name="RIGHT_WING">
    <location unit="IN">
     <x> 506.33 </x>
     <y> 216.53 </y>
     <z>  -8.53 </z>
    </location>
    <static_friction>  0.80 </static_friction>
    <dynamic_friction> 0.50 </dynamic_friction>
    <spring_coeff unit="LBS/FT">      35005.99 </spring_coeff>
    <damping_coeff unit="LBS/FT/SEC">  7001.20 </damping_coeff>
  </contact>

  <contact type="STRUCTURE" name="TAIL_BUMPER">
    <location unit="IN">
     <x> 512.33 </x>
     <y>   0.00 </y>
     <z> -46.40 </z>
    </location>
    <static_friction>  0.80 </static_friction>
    <dynamic_friction> 0.50 </dynamic_friction>
    <spring_coeff unit="LBS/FT">      35005.99 </spring_coeff>
    <damping_coeff unit="LBS/FT/SEC">  7001.20 </damping_coeff>
  </contact>

  <contact type="STRUCTURE" name="TAIL_FIN">
    <location unit="IN">
     <x> 578.35 </x>
     <y>   0.00 </y>
     <z> 158.00 </z>
    </location>
    <static_friction>  0.80 </static_friction>
    <dynamic_friction> 0.50 </dynamic_friction>
    <spring_coeff unit="LBS/FT">      35005.99 </spring_coeff>
    <damping_coeff unit="LBS/FT/SEC">  7001.20 </damping_coeff>
  </contact>

  <contact type="STRUCTURE" name="INTAKE">
    <location unit="IN">
     <x>  33.13 </x>
     <y>   0.00 </y>
     <z> -22.82 </z>
    </location>
    <static_friction>  0.80 </static_friction>
    <dynamic_friction> 0.50 </dynamic_friction>
    <spring_coeff unit="LBS/FT">      35005.99 </spring_coeff>
    <damping_coeff unit="LBS/FT/SEC">  7001.20 </damping_coeff>
  </contact>

</ground_reactions>

 <propulsion>

   <engine file="AvonMk210">
    <location unit="IN">
      <x> 196.00 </x>
      <y>   0.00 </y>
      <z> -17.72 </z>
    </location>
    <orient unit="DEG">
      <roll>   0.00 </roll>
      <pitch> 0.00 </pitch>
      <yaw>   0.00 </yaw>
    </orient>
    <feed>0</feed>
    <feed>1</feed>
    <feed>2</feed>
    <thruster file="direct">
     <location unit="IN">
       <x> 590.00 </x>
       <y>   0.00 </y>
       <z> -17.72 </z>
     </location>
     <orient unit="DEG">
       <roll>   0.00 </roll>
       <pitch> 0.00 </pitch>
       <yaw>   0.00 </yaw>
     </orient>
    </thruster>
  </engine>

   <engine file="AvonMk210">
    <location unit="IN">
      <x> 196.00 </x>
      <y>   0.00 </y>
      <z>  17.72 </z>
    </location>
    <orient unit="DEG">
      <roll>   0.00 </roll>
      <pitch> 0.00 </pitch>
      <yaw>   0.00 </yaw>
    </orient>
    <feed>0</feed>
    <feed>1</feed>
    <feed>2</feed>
    <thruster file="direct">
     <location unit="IN">
       <x> 590.00 </x>
       <y>   0.00 </y>
       <z>  17.72 </z>
     </location>
     <orient unit="DEG">
       <roll>   0.00 </roll>
       <pitch> 0.00 </pitch>
       <yaw>   0.00 </yaw>
     </orient>
    </thruster>
  </engine>

  <tank type="FUEL">
  <!-- Ventral -->
     <location unit="IN">
       <x> 366.00 </x>
       <y>   0.00 </y>
       <z> -43.30 </z>
     </location>
     <capacity unit="LBS"> 2000.00 </capacity>
     <contents unit="LBS"> 1750.00 </contents>
  </tank>

  <tank type="FUEL">
  <!-- Port Tanks: torsion box, wing and flap -->
     <location unit="IN">
       <x> 248.82 </x>
       <y> -61.02 </y>
       <z>   0.20 </z>
     </location>
     <capacity unit="LBS"> 2500.00 </capacity>
     <contents unit="LBS"> 2250.00 </contents>
  </tank>

  <tank type="FUEL">
  <!-- Starboard Tanks: torsion box, wing and flap -->
     <location unit="IN">
       <x> 248.82 </x>
       <y>  61.02 </y>
       <z>   0.20 </z>
     </location>
     <capacity unit="LBS"> 2500.00 </capacity>
     <contents unit="LBS"> 2250.00 </contents>
  </tank>

 </propulsion>

 <flight_control name="FCS: lightning-f1a">

  <!-- Declare Properties -->
    <property>/accelerations/pilot-g</property>
    <property>/sim/model/lightning/controls/shut_down</property>
    <property>/sim/model/lightning/engines/aux_intakes_open</property>
  <!-- <property>/gear/gear/caster-angle-deg</property> -->

<!--
  <channel name="nosewheel">

     <pure_gain name="nosewheel caster">
       <input>fcs/steer-pos-deg</input>
       <gain>1</gain>
       <output>/gear/gear/caster-angle-deg</output>
     </pure_gain>

  </channel>
-->

  <channel name="Pitch">
    <summer name="Pitch Trim Sum">
      <input>fcs/elevator-cmd-norm</input>
      <input>fcs/pitch-trim-cmd-norm</input>
      <clipto>
        <min> -1 </min>
        <max>  1 </max>
      </clipto>
      <output>fcs/elevator-pos-norm</output>
    </summer>

    <aerosurface_scale name="Elevator Control">
      <input>fcs/pitch-trim-sum</input>
      <range>
        <min> -0.35 </min>
        <max>  0.30 </max>
      </range>
      <output>fcs/elevator-pos-rad</output>
    </aerosurface_scale>

    <pure_gain name="g load norm">
      <input>-accelerations/n-pilot-z-norm</input>
      <gain>1</gain>
      <output>/accelerations/pilot-g</output>
    </pure_gain>
  </channel>

  <channel name="Roll">
   <summer name="Roll Trim Sum">
      <input>fcs/aileron-cmd-norm</input>
      <input>fcs/roll-trim-cmd-norm</input>
      <clipto>
        <min> -1 </min>
        <max>  1 </max>
      </clipto>
   </summer>

   <aerosurface_scale name="Left Aileron Control">
      <input>fcs/roll-trim-sum</input>
      <range>
        <min> -0.35 </min>
        <max>  0.35 </max>
      </range>
      <output>fcs/left-aileron-pos-rad</output>
   </aerosurface_scale>
   <aerosurface_scale name="Left Aileron Control norm">
      <input>fcs/roll-trim-sum</input>
      <range>
        <min> -1 </min>
        <max>  1 </max>
      </range>
      <output>fcs/left-aileron-pos-norm</output>
   </aerosurface_scale>

   <aerosurface_scale name="Right Aileron Control">
      <input>-fcs/roll-trim-sum</input>
      <range>
        <min> -0.35 </min>
        <max>  0.35 </max>
      </range>
      <output>fcs/right-aileron-pos-rad</output>
   </aerosurface_scale>
   <aerosurface_scale name="Right Aileron Control norm">
      <input>-fcs/roll-trim-sum</input>
      <range>
        <min> -1 </min>
        <max>  1 </max>
      </range>
      <output>fcs/right-aileron-pos-norm</output>
   </aerosurface_scale>


  </channel>

  <channel name="Yaw">
   <summer name="Rudder Command Sum">
      <input>fcs/rudder-cmd-norm</input>
      <input>fcs/yaw-trim-cmd-norm</input>
      <clipto>
        <min> -0.35 </min>
        <max>  0.35 </max>
      </clipto>
   </summer>

   <scheduled_gain name="Yaw Damper Rate">
      <input>velocities/r-aero-rad_sec</input>
      <table>
        <independentVar lookup="row">velocities/ve-kts</independentVar>
         <tableData>
            30     0.00
            60     2.00
         </tableData>
      </table>
   </scheduled_gain>

   <scheduled_gain name="Yaw Damper Beta">
      <input>aero/beta-rad</input>
      <table>
        <independentVar lookup="row">velocities/ve-kts</independentVar>
        <tableData>
           30     0.00
           60     0.00
        </tableData>
      </table>
   </scheduled_gain>

   <summer name="Yaw Damper Sum">
      <input>fcs/yaw-damper-beta</input>
      <input>fcs/yaw-damper-rate</input>
      <clipto>
        <min> -0.1 </min>
        <max>  0.1 </max>
      </clipto>
   </summer>

   <scheduled_gain name="Yaw Damper Final">
      <input>fcs/yaw-damper-sum</input>
      <table>
        <independentVar lookup="row">velocities/ve-kts</independentVar>
        <tableData>
           30         0.0
           31         1.0
        </tableData>
      </table>
   </scheduled_gain>

   <summer name="Rudder Sum">
      <input>fcs/rudder-command-sum</input>
      <input>fcs/yaw-damper-final</input>
      <clipto>
        <min> -1 </min>
        <max>  1 </max>
      </clipto>
      <output>fcs/rudder-pos-norm</output>
   </summer>

   <aerosurface_scale name="Rudder Control">
      <input>fcs/rudder-sum</input>
      <range>
        <min> -0.35 </min>
        <max>  0.35 </max>
      </range>
      <output>fcs/rudder-pos-rad</output>
   </aerosurface_scale>

  </channel>


  <channel name="Flaps">
   <kinematic name="Flaps Control">
     <input>fcs/flap-cmd-norm</input>
     <traverse>
       <setting>
          <position>  0 </position>
          <time>      0 </time>
       </setting>
       <setting>
          <position> 50 </position>
          <time>      6 </time>
       </setting>
     </traverse>
     <output>fcs/flap-pos-deg</output>
   </kinematic>

   <aerosurface_scale name="Flaps Control Norm">
      <input>fcs/flap-pos-deg</input>
      <domain>
        <min> 0 </min>
        <max> 50 </max>
      </domain>
      <range>
        <min> 0 </min>
        <max> 1 </max>
      </range>
      <output>fcs/flap-pos-norm</output>
   </aerosurface_scale>

  </channel>

  <channel name="Throttle Control">

    <scheduled_gain name="Throttle1">
      <input>fcs/throttle-cmd-norm[0]</input>
        <table>
          <independentVar>fcs/throttle-pos-norm[0]</independentVar>
          <tableData>
            0.00    0.0
            0.09    0.0
            0.88    1.0
            1.00    2.0
          </tableData>
        </table>
      <output>fcs/throttle-pos-norm[0]</output>
    </scheduled_gain>
    <scheduled_gain name="Throttle2">
      <input>fcs/throttle-cmd-norm[1]</input>
        <table>
          <independentVar>fcs/throttle-pos-norm[1]</independentVar>
          <tableData>
            0.00    0.0
            0.09    0.0
            0.86    1.0
            1.00    2.0
          </tableData>
        </table>
      <output>fcs/throttle-pos-norm[1]</output>
    </scheduled_gain>

    <switch name="Shutoff0">
      <default value="0"/>
      <test logic="AND" value="1">
        fcs/throttle-cmd-norm[0] lt 0.08
        /sim/model/lightning/controls/shut_down == 1
      </test>
    </switch>
    <switch name="Shutoff1">
      <default value="0"/>
      <test logic="AND" value="1">
        fcs/throttle-cmd-norm[1] lt 0.08
        /sim/model/lightning/controls/shut_down == 1
      </test>
    </switch>
    <switch name="engine_running">
      <default value="0"/>
      <test logic="OR" value="1">
         propulsion/engine/n1 gt 33
         propulsion/engine[1]/n1 gt 33
      </test>
    </switch>
    <switch name="aux_intakes_open">
      <default value="0"/>
      <test logic="AND" value="1">
         fcs/engine_running eq 1
         velocities/ve-kts lt 170
      </test>
      <output>/sim/model/lightning/engines/aux_intakes_open</output>
    </switch>
   </channel>

  <channel name="Landing Gear">
   <kinematic name="Gear Control">
     <input>gear/gear-cmd-norm</input>
     <traverse>
       <setting>
          <position> 0 </position>
          <time>     0 </time>
       </setting>
       <setting>
          <position> 1 </position>
          <time>     5 </time>
       </setting>
     </traverse>
     <output>gear/gear-pos-norm</output>
   </kinematic>

  </channel>

  <channel name="Speedbrake">
   <kinematic name="Speedbrake Control">
     <input>fcs/speedbrake-cmd-norm</input>
     <traverse>
       <setting>
          <position> 0 </position>
          <time>     0 </time>
       </setting>
       <setting>
          <position> 1 </position>
          <time>     3 </time>
       </setting>
     </traverse>
     <output>fcs/speedbrake-pos-norm</output>
   </kinematic>

  </channel>

 </flight_control>

 <aerodynamics>

 <axis name="LIFT">

    <function name="aero/coefficient/CLalpha">
      <description>Lift_due_to_alpha</description>
      <product>
          <property>aero/qbar-psf</property>
          <property>metrics/Sw-sqft</property>
          <table>
            <independentVar lookup="row">aero/alpha-rad</independentVar>
            <independentVar lookup="column">fcs/flap-pos-norm</independentVar>
        <!-- From BAC wind tunnel data, greatful thanks to Aerospaceweb.org  -->
            <tableData>
						0		1
				-0.03	-0.08	-0.27
				0.00	0.0		0.17
				0.03	0.08	0.27
				0.07	0.17	0.37
				0.10	1.27	0.47
				0.14	0.38	0.57
				0.17	0.50	0.67
				0.21	0.61	0.78
				0.24	0.71	0.88
				0.28	0.81	0.98
				0.31	0.91	1.07
				0.35	1.00	1.15
				0.38	1.09	1.22
				0.42	1.17	1.27
				0.45	1.22	1.27
				0.49	1.26	1.22
				0.52	1.27	1.16
            </tableData>
          </table>
      </product>
    </function>

    <function name="aero/coefficient/dCLsb">
       <description>Delta_Lift_due_to_speedbrake</description>
       <product>
           <property>aero/qbar-psf</property>
           <property>metrics/Sw-sqft</property>
           <property>fcs/speedbrake-pos-norm</property>
           <value>-0.0010</value>
       </product>
    </function>

    <function name="aero/coefficient/CLde">
       <description>Lift_due_to_Elevator_Deflection</description>
       <product>
           <property>aero/qbar-psf</property>
           <property>metrics/Sw-sqft</property>
           <property>fcs/elevator-pos-rad</property>
           <value>0.2</value>
       </product>
    </function>

  </axis>

  <axis name="DRAG">

    <function name="aero/coefficient/CDalpha">
      <description>Drag_due_to_alpha</description>
      <product>
          <property>aero/qbar-psf</property>
          <property>metrics/Sw-sqft</property>
          <table>
            <independentVar lookup="row">aero/alpha-rad</independentVar>
            <independentVar lookup="column">fcs/flap-pos-norm</independentVar>
        <!-- From BAC wind tunnel data, greatful thanks to Aerospaceweb.org  -->
            <tableData>
						0		1
				0.00	0.020	0.07
				0.03	0.020	0.07
				0.07	0.030	0.08
				0.10	0.040	0.09
				0.14	0.050	0.11
				0.17	0.075	0.13
				0.21	0.105	0.16
				0.24	0.140	0.20
				0.28	0.180	0.25
				0.31	0.225	0.31
				0.35	0.275	0.37
				0.38	0.335	0.43
				0.42	0.405	0.50
				0.45	0.480	0.55
				0.49	0.560	0.59
				0.52	0.650	0.63
            </tableData>
          </table>
      </product>
    </function>

<!--

    <function name="aero/coefficient/CD0">
       <description>Drag_at_zero_lift</description>
       <product>
          <property>aero/qbar-psf</property>
          <property>metrics/Sw-sqft</property>
          <table>
            <independentVar lookup="row">aero/alpha-rad</independentVar>
            <tableData>
             -1.57       1.500
             -0.26    0.031
              0.00    0.024
              0.26    0.031
              1.57       1.500
            </tableData>
          </table>
       </product>
    </function>

    <function name="aero/coefficient/CDi">
       <description>Induced_drag</description>
         <product>
           <property>aero/qbar-psf</property>
           <property>metrics/Sw-sqft</property>
           <property>aero/cl-squared</property>
           <value>0.08</value>
         </product>
    </function>
-->
    <function name="aero/coefficient/CDmach">
       <description>Drag_due_to_mach</description>
        <product>
          <property>aero/qbar-psf</property>
          <property>metrics/Sw-sqft</property>
          <table>
            <independentVar lookup="row">velocities/mach</independentVar>
            <tableData>
                0.00      0.000
                0.81      0.000
                1.10      0.010
                1.80      0.008
            </tableData>
          </table>
        </product>
    </function>

    <function name="aero/coefficient/CDgear">
       <description>Drag_due_to_gear</description>
         <product>
           <property>aero/qbar-psf</property>
           <property>metrics/Sw-sqft</property>
           <property>gear/gear-pos-norm</property>
           <value>0.02</value>
         </product>
    </function>

    <function name="aero/coefficient/CDsb">
       <description>Drag_due_to_speedbrakes</description>
         <product>
           <property>aero/qbar-psf</property>
           <property>metrics/Sw-sqft</property>
           <property>fcs/speedbrake-pos-norm</property>
           <value>0.06</value>
         </product>
    </function>

    <function name="aero/coefficient/CDbc">
       <description>Drag_due_to_braking_chute</description>
         <product>
           <property>aero/qbar-psf</property>
           <property>metrics/Sw-sqft</property>
           <property>/sim/model/lightning/controls/flight/chute_open</property>
           <value>1.035</value>
         </product>
    </function>

    <function name="aero/coefficient/CDbeta">
       <description>Drag_due_to_sideslip</description>
       <product>
          <property>aero/qbar-psf</property>
          <property>metrics/Sw-sqft</property>
          <table>
            <independentVar lookup="row">aero/beta-rad</independentVar>
            <tableData>
              -1.57    1.230
              -0.26    0.050
               0.00    0.000
               0.26    0.050
               1.57    1.230
            </tableData>
          </table>
       </product>
    </function>

    <function name="aero/coefficient/CDde">
       <description>Drag_due_to_Elevator_Deflection</description>
       <product>
           <property>aero/qbar-psf</property>
           <property>metrics/Sw-sqft</property>
           <abs><property>fcs/elevator-pos-norm</property></abs>
           <value>0.04</value>
       </product>
    </function>

  </axis>

  <axis name="SIDE">

    <function name="aero/coefficient/CYb">
       <description>Side_force_due_to_beta</description>
       <product>
           <property>aero/qbar-psf</property>
           <property>metrics/Sw-sqft</property>
           <property>aero/beta-rad</property>
           <value>-1</value>
       </product>
    </function>

  </axis>

  <axis name="ROLL">

    <function name="aero/coefficient/Clb">
       <description>Roll_moment_due_to_beta</description>
       <product>
           <property>aero/qbar-psf</property>
           <property>metrics/Sw-sqft</property>
           <property>metrics/bw-ft</property>
           <property>aero/beta-rad</property>
           <value>-0.1</value>
       </product>
    </function>

    <function name="aero/coefficient/Clp">
       <description>Roll_moment_due_to_roll_rate</description>
       <product>
           <property>aero/qbar-psf</property>
           <property>metrics/Sw-sqft</property>
           <property>metrics/bw-ft</property>
           <property>aero/bi2vel</property>
           <property>velocities/p-aero-rad_sec</property>
           <value>-0.4</value>
       </product>
    </function>

    <function name="aero/coefficient/Clr">
       <description>Roll_moment_due_to_yaw_rate</description>
       <product>
           <property>aero/qbar-psf</property>
           <property>metrics/Sw-sqft</property>
           <property>metrics/bw-ft</property>
           <property>aero/bi2vel</property>
           <property>velocities/r-aero-rad_sec</property>
           <value>0.15</value>
       </product>
    </function>

    <function name="aero/coefficient/Clda">
       <description>Roll_moment_due_to_aileron</description>
       <product>
          <property>aero/qbar-psf</property>
          <property>metrics/Sw-sqft</property>
          <property>metrics/bw-ft</property>
          <property>fcs/left-aileron-pos-rad</property>
          <table>
            <independentVar lookup="row">velocities/mach</independentVar>
            <tableData>
              0.0    0.120
              2.0    0.040
            </tableData>
          </table>
       </product>
    </function>

    <function name="aero/coefficient/Cldr">
       <description>Roll_moment_due_to_rudder</description>
       <product>
           <property>aero/qbar-psf</property>
           <property>metrics/Sw-sqft</property>
           <property>metrics/bw-ft</property>
           <property>fcs/rudder-pos-rad</property>
           <value>0.01</value>
       </product>
    </function>

  </axis>

  <axis name="PITCH">

    <function name="aero/coefficient/Cmalpha">
       <description>Pitch_moment_due_to_alpha</description>
       <product>
         <property>aero/qbar-psf</property>
         <property>metrics/Sw-sqft</property>
         <property>metrics/cbarw-ft</property>
         <table>
           <independentVar lookup="row">aero/alpha-rad</independentVar>
           <independentVar lookup="column">fcs/flap-pos-norm</independentVar>
           <!-- From BAC wind tunnel data, greatful thanks to Aerospaceweb.org  -->
           <tableData>
						0		1
				0	-0.017	-0.072
				2	-0.013	-0.068
				4	-0.008	-0.062
				6	-0.006	-0.060
				8	0.005	-0.053
				10	0.010	-0.040
				12	0.016	-0.032
				14	0.026	-0.025
				16	0.040	-0.015
				18	0.055	0.005
				20	0.070	0.013
				22	0.088	0.020
				24	0.108	0.037
				26	0.124	0.045
				28	0.132	0.074
				30	0.140	0.074
           </tableData>
         </table>
       </product>
    </function>

    <function name="aero/coefficient/Cmde">
       <description>Pitch_moment_due_to_elevator</description>
       <product>
          <property>aero/qbar-psf</property>
          <property>metrics/Sw-sqft</property>
          <property>metrics/cbarw-ft</property>
          <property>fcs/elevator-pos-rad</property>
          <table>
            <independentVar lookup="row">velocities/mach</independentVar>
            <tableData>
              0.0     -0.800
              2.0     -0.200
            </tableData>
          </table>
       </product>
    </function>

    <function name="aero/coefficient/Cmq">
       <description>Pitch_moment_due_to_pitch_rate</description>
       <product>
           <property>aero/qbar-psf</property>
           <property>metrics/Sw-sqft</property>
           <property>metrics/cbarw-ft</property>
           <property>aero/ci2vel</property>
           <property>velocities/q-aero-rad_sec</property>
           <value>-18</value>
       </product>
    </function>

    <function name="aero/coefficient/Cmadot">
       <description>Pitch_moment_due_to_alpha_rate</description>
       <product>
           <property>aero/qbar-psf</property>
           <property>metrics/Sw-sqft</property>
           <property>metrics/cbarw-ft</property>
           <property>aero/ci2vel</property>
           <property>aero/alphadot-rad_sec</property>
           <value>-9</value>
       </product>
    </function>

  </axis>

  <axis name="YAW">

    <function name="aero/coefficient/Cnb">
       <description>Yaw_moment_due_to_beta</description>
       <product>
           <property>aero/qbar-psf</property>
           <property>metrics/Sw-sqft</property>
           <property>metrics/bw-ft</property>
           <property>aero/beta-rad</property>
           <value>0.12</value>
       </product>
    </function>

    <function name="aero/coefficient/Cnr">
       <description>Yaw_moment_due_to_yaw_rate</description>
       <product>
           <property>aero/qbar-psf</property>
           <property>metrics/Sw-sqft</property>
           <property>metrics/bw-ft</property>
           <property>aero/bi2vel</property>
           <property>velocities/r-aero-rad_sec</property>
           <value>-0.15</value>
       </product>
    </function>

    <function name="aero/coefficient/Cndr">
       <description>Yaw_moment_due_to_rudder</description>
       <product>
           <property>aero/qbar-psf</property>
           <property>metrics/Sw-sqft</property>
           <property>metrics/bw-ft</property>
           <property>fcs/rudder-pos-rad</property>
           <value>-0.1</value>
       </product>
    </function>

    <function name="aero/coefficient/Cnda">
       <description>Adverse_yaw</description>
       <product>
           <property>aero/qbar-psf</property>
           <property>metrics/Sw-sqft</property>
           <property>metrics/bw-ft</property>
           <property>fcs/left-aileron-pos-rad</property>
           <value>0</value>
       </product>
    </function>

  </axis>

 </aerodynamics>

</fdm_config>
